# OpenSim document version 20302
MarkerSet GeneratedMarkerSet:
  Marker RSHO: torso (-0.003 0.425 0.13) fixed=true
  Marker LSHO: torso (-0.003 0.425 -0.13) fixed=true
  Marker RHLT: humerus_r (0.00587367 -0.129444 0.0220727) fixed=true
  Marker LHLT: humerus_l (0.00580709 -0.125721 -0.0298131) fixed=true
  Marker RHVT: humerus_r (0.0449329 -0.129807 6.42431e-6) fixed=true
  Marker LHVT: humerus_l (0.0449329 -0.129807 -6.42431e-6) fixed=true
  Marker MSTC: torso (0.0426971 0.379441 -0.00194467) fixed=true
  Marker RLEK: humerus_r (0.015 -0.28 0.04) fixed=true
  Marker RMEK: humerus_r (0.00225 -0.286 -0.046) fixed=true
  Marker LLEK: humerus_l (0.015 -0.28 -0.04) fixed=true
  Marker LMEK: humerus_l (0.00225005 -0.286 0.046) fixed=true
  Marker RFRA: ulna_r (-0.00902451 -0.118517 0.0659393) fixed=true
  Marker RFUL: ulna_r (-0.0315658 -0.125336 -0.0131706) fixed=true
  Marker LFRA: ulna_l (-0.00902451 -0.118517 -0.0659393) fixed=true
  Marker LFUL: ulna_l (-0.0315658 -0.125336 0.0131706) fixed=true
  Marker RWRA: radius_r (0.0005 -0.225 0.05) fixed=true
  Marker RWUL: radius_r (-0.022 -0.225 -0.022) fixed=true
  Marker LWRA: radius_l (0.0005 -0.225 -0.05) fixed=true
  Marker LWUL: radius_l (-0.022 -0.225 0.022) fixed=true
  Marker RASI: pelvis (0.00725057 -0.00588547 0.11264) fixed=true
  Marker LASI: pelvis (0.00725057 -0.00588547 -0.11264) fixed=true
  Marker RTMS: pelvis (-0.0100007 0.0353609 0.141715) fixed=true
  Marker LTMS: pelvis (-0.0100007 0.0353609 -0.141715) fixed=true
  Marker RPSI: pelvis (-0.155 0.035 0.045) fixed=true
  Marker LPSI: pelvis (-0.155 0.035 -0.045) fixed=true
  Marker SACR: pelvis (-0.143659 0.0561014 0) fixed=true
  Marker CVC7: torso (-0.085 0.435 0.00165426) fixed=true
  Marker LBHD: torso (-0.0686083 0.623087 -0.0363533) fixed=true
  Marker RBHD: torso (-0.0686083 0.623087 0.0363533) fixed=true
  Marker LFHD: torso (0.0707969 0.620352 -0.0415974) fixed=true
  Marker RFHD: torso (0.0707969 0.620352 0.0415974) fixed=true
  Marker RTLH: femur_r (0.0100122 -0.149218 0.0930769) fixed=true
  Marker LTLH: femur_l (0.0100122 -0.149218 -0.0930769) fixed=true
  Marker RTLL: femur_r (0.0117212 -0.283283 0.079093) fixed=true
  Marker LTLL: femur_l (0.0117212 -0.283283 -0.079093) fixed=true
  Marker RTFR: femur_r (0.0807379 -0.261245 0.00968276) fixed=true
  Marker LTFR: femur_l (0.0807379 -0.261245 -0.00968276) fixed=true
  Marker RLCO: femur_r (0 -0.404 0.05) fixed=true
  Marker LLCO: femur_l (0 -0.404 -0.05) fixed=true
  Marker RMCO: femur_r (0 -0.404 -0.05) fixed=true
  Marker LMCO: femur_l (0 -0.404 0.05) fixed=true
  Marker RTIB: tibia_r (-0.00379356 -0.0427297 0.0519845) fixed=true
  Marker LTIB: tibia_l (-0.00379356 -0.0427297 -0.0519845) fixed=true
  Marker RTTT: tibia_r (0.0565283 -0.0443862 0.000724809) fixed=true
  Marker LTTT: tibia_l (0.0565283 -0.0443862 -0.000724809) fixed=true
  Marker RTMT: tibia_r (0.0369643 -0.230107 -0.00391699) fixed=true
  Marker LTMT: tibia_l (0.0369643 -0.230107 0.00391699) fixed=true
  Marker RTLF: tibia_r (0.0113793 -0.295236 0.0553541) fixed=true
  Marker LTLF: tibia_l (0.0113793 -0.295236 -0.0553541) fixed=true
  Marker RLMA: tibia_r (-0.005 -0.3888 0.053) fixed=true
  Marker LLMA: tibia_l (-0.005 -0.3888 -0.053) fixed=true
  Marker RMMA: tibia_r (0.006 -0.3888 -0.038) fixed=true
  Marker LMMA: tibia_l (0.006 -0.3888 0.038) fixed=true
  Marker RTO1: calcn_r (0.233469 0.0161821 -0.0204925) fixed=true
  Marker LTO1: calcn_l (0.233469 0.0161821 0.0204925) fixed=true
  Marker RTO3: calcn_r (0.178155 0.0197917 0.0112671) fixed=true
  Marker LTO3: calcn_l (0.178155 0.0197917 -0.0112671) fixed=true
  Marker RTO5: calcn_r (0.18776 0.010815 0.0455057) fixed=true
  Marker LTO5: calcn_l (0.18776 0.010815 -0.0455057) fixed=true
  Marker RHEE: calcn_r (-0.025 0.02 -0.005) fixed=true
  Marker LHEE: calcn_l (-0.025 0.02 0.005) fixed=true
