# OpenSim document version 20302
MarkerSet GeneratedMarkerSet:
  Marker LASI: pelvis (0.02 0.03 -0.128) fixed=true
  Marker RASI: pelvis (0.02 0.03 0.128) fixed=true
  Marker LPSI: pelvis (-0.14 0.07 -0.06) fixed=true
  Marker RPSI: pelvis (-0.14 0.07 0.06) fixed=true
  Marker LTHI: femur_l (0.018 -0.23 -0.064) fixed=true
  Marker RTHI: femur_r (0.018 -0.23 0.064) fixed=true
  Marker LKNE: femur_l (0 -0.404 -0.05) fixed=true
  Marker LMEK: femur_l (0 -0.404 0.05) fixed=true
  Marker LLSHA: tibia_l (0.02 -0.25 -0.05) fixed=true
  Marker LANK: tibia_l (-0.005 -0.41 -0.053) fixed=true
  Marker LMM: tibia_l (0.006 -0.388 0.038) fixed=true
  Marker RKNE: femur_r (0 -0.404 0.05) fixed=true
  Marker RMEK: femur_r (0 -0.404 -0.05) fixed=true
  Marker RANK: tibia_r (-0.005 -0.41 0.053) fixed=true
  Marker RMM: tibia_r (0.006 -0.388 -0.038) fixed=true
  Marker C7: torso (-0.07 0.42 0) fixed=true
  Marker T10: torso (-0.1 0.22 0) fixed=true
  Marker STRN: torso (0.1 0.22 0) fixed=true
  Marker JN: torso (0 0.39 0) fixed=true
  Marker RLSHA: tibia_r (0.02 -0.25 0.05) fixed=true
  Marker RTOE: toes_r (0.0449806 0.0373648 0.0207998) fixed=true
  Marker RHEE: calcn_r (-0.025 0.025 0) fixed=true
  Marker Rrear1: calcn_r (0.00621596 -0.0113677 0.0253773) fixed=true
  Marker Rrear2: calcn_r (0.0593675 -0.0167715 0.0385967) fixed=true
  Marker RStatic1: toes_r (-0.0192506 0.048834 -0.0452432) fixed=true
  Marker RStatic2: talus_r (0.0558771 0.0087273 -0.0417424) fixed=true
  Marker RStatic3: toes_r (-0.0464608 0.0222721 -0.0513284) fixed=true
  Marker RStatic4: toes_r (0.0134496 0.0280587 -0.0446889) fixed=true
  Marker RStatic5: talus_r (0.0184679 -0.00281928 -0.0506327) fixed=true
  Marker RStatic6: toes_r (0.0616106 -0.020051 -0.034902) fixed=true
  Marker RStatic7: calcn_r (0.0307515 -0.0198201 -0.0436674) fixed=true
  Marker LHEE: calcn_l (-0.025 0.025 0) fixed=true
  Marker LStatic3: calcn_l (0.0307515 -0.0198201 0.0436674) fixed=true
  Marker LStatic4: toes_l (0.0616106 -0.020051 0.034902) fixed=true
  Marker LStatic5: toes_l (0.0412685 -0.0218856 -0.0594629) fixed=true
  Marker LRear1: calcn_l (0.00621596 -0.0113677 -0.0253773) fixed=true
  Marker LRear2: calcn_l (0.0593675 -0.0167715 -0.0385967) fixed=true
  Marker LTOE: toes_l (0.0449806 0.0373648 -0.0207998) fixed=true
  Marker LMIMU: toes_l (-0.0127088 0.0554691 0.000251377) fixed=true
  Marker LStatic1: calcn_l (0.0331975 0.061908 0.066626) fixed=true
  Marker LStatic2: toes_l (-0.0378855 0.0503844 0.0479882) fixed=true
  Marker RMT2: calcn_r (0.2 0.001 0) fixed=true
  Marker RMT5: calcn_r (0.135 0.02 0.04) fixed=true
  Marker LMT2: calcn_l (0.2 0.001 0) fixed=true
  Marker LMT5: calcn_l (0.135 0.02 -0.04) fixed=true
  Marker pelvis1: torso (-0.066158 0.112891 0.0489797) fixed=true
  Marker pelvis2: torso (-0.066158 0.112891 -0.0489797) fixed=true
  Marker pelvis3: torso (-0.066158 0.0528911 0.0489797) fixed=true
  Marker pelvis4: torso (-0.066158 0.0528911 -0.0489797) fixed=true
