# OpenSim document version 20302
MarkerSet GeneratedMarkerSet:
  Marker LASIS: pelvis (0.02 0.03 -0.128) fixed=true
  Marker RASIS: pelvis (0.02 0.03 0.128) fixed=true
  Marker LPSIS: pelvis (-0.14 0.07 -0.06) fixed=true
  Marker RPSIS: pelvis (-0.14 0.07 0.06) fixed=true
  Marker LLTHI: femur_l (0.018 -0.23 -0.064) fixed=true
  Marker RLTHI: femur_r (0.018 -0.23 0.064) fixed=true
  Marker LLEK: femur_l (0 -0.404 -0.05) fixed=true
  Marker LMEK: femur_l (0 -0.404 0.05) fixed=true
  Marker LLSHA: tibia_l (0.02 -0.25 -0.05) fixed=true
  Marker LLM: tibia_l (-0.005 -0.41 -0.053) fixed=true
  Marker LMM: tibia_l (0.006 -0.388 0.038) fixed=true
  Marker LHEE: calcn_l (-0.02 0.02 0) fixed=true
  Marker LMT2: calcn_l (0.2 0.001 0) fixed=true
  Marker LMT5: calcn_l (0.135 0.02 -0.04) fixed=true
  Marker RLEK: femur_r (0 -0.404 0.05) fixed=true
  Marker RMEK: femur_r (0 -0.404 -0.05) fixed=true
  Marker RLM: tibia_r (-0.005 -0.41 0.053) fixed=true
  Marker RMM: tibia_r (0.006 -0.388 -0.038) fixed=true
  Marker RHEE: calcn_r (-0.02 0.02 0) fixed=true
  Marker RMT2: calcn_r (0.2 0.001 0) fixed=true
  Marker RMT5: calcn_r (0.135 0.02 0.04) fixed=true
  Marker C7: torso (-0.07 0.42 0) fixed=true
  Marker T10: torso (-0.1 0.22 0) fixed=true
  Marker XIPH: torso (0.1 0.22 0) fixed=true
  Marker JN: torso (0 0.39 0) fixed=true
  Marker RLSHA: tibia_r (0.02 -0.25 0.05) fixed=true
