# OpenSim document version 30000
InverseKinematicsTool subject01:
  model_file: Aline\Aline_scaled_model_markers.osim
  constraint_weight: 20
  accuracy: 1e-5
  marker_file: pre8walk01.trc
  time_range: 0 4.65
  output_motion_file: Aline\pre8walk01__motion.mot
  IKTaskSet ik_tasks:
    IKMarkerTask RSHO: apply=true weight=1
    IKMarkerTask LSHO: apply=true weight=1
    IKMarkerTask RHLT: apply=true weight=1
    IKMarkerTask LHLT: apply=true weight=1
    IKMarkerTask RHVT: apply=true weight=1
    IKMarkerTask LHVT: apply=true weight=1
    IKMarkerTask MSTC: apply=true weight=1
    IKMarkerTask RLEK: apply=true weight=1
    IKMarkerTask RMEK: apply=true weight=1
    IKMarkerTask LLEK: apply=true weight=1
    IKMarkerTask LMEK: apply=true weight=1
    IKMarkerTask RFRA: apply=true weight=1
    IKMarkerTask RFUL: apply=true weight=1
    IKMarkerTask LFRA: apply=true weight=1
    IKMarkerTask LFUL: apply=true weight=1
    IKMarkerTask RWRA: apply=true weight=1
    IKMarkerTask RWUL: apply=true weight=1
    IKMarkerTask LWRA: apply=true weight=1
    IKMarkerTask LWUL: apply=true weight=1
    IKMarkerTask RASI: apply=true weight=1
    IKMarkerTask LTMS: apply=true weight=1
    IKMarkerTask RTMS: apply=true weight=1
    IKMarkerTask RPSI: apply=true weight=1
    IKMarkerTask LPSI: apply=true weight=1
    IKMarkerTask SACR: apply=true weight=1
    IKMarkerTask CVC7: apply=true weight=1
    IKMarkerTask LBHD: apply=true weight=1
    IKMarkerTask RBHD: apply=true weight=1
    IKMarkerTask LFHD: apply=true weight=1
    IKMarkerTask RFHD: apply=true weight=1
    IKMarkerTask RTLH: apply=true weight=1
    IKMarkerTask LTLH: apply=true weight=1
    IKMarkerTask RTLL: apply=true weight=1
    IKMarkerTask LTLL: apply=true weight=1
    IKMarkerTask RTFR: apply=true weight=1
    IKMarkerTask LTFR: apply=true weight=1
    IKMarkerTask RLCO: apply=true weight=1
    IKMarkerTask LLCO: apply=true weight=1
    IKMarkerTask RMCO: apply=true weight=1
    IKMarkerTask LMCO: apply=true weight=1
    IKMarkerTask RTIB: apply=true weight=1
    IKMarkerTask LTIB: apply=true weight=1
    IKMarkerTask RTTT: apply=true weight=1
    IKMarkerTask LTTT: apply=true weight=1
    IKMarkerTask RTMT: apply=true weight=1
    IKMarkerTask LTMT: apply=true weight=1
    IKMarkerTask RTLF: apply=true weight=1
    IKMarkerTask LTLF: apply=true weight=1
    IKMarkerTask RLMA: apply=true weight=1
    IKMarkerTask LLMA: apply=true weight=1
    IKMarkerTask RMMA: apply=true weight=1
    IKMarkerTask LMMA: apply=true weight=1
    IKMarkerTask RTO1: apply=true weight=1
    IKMarkerTask LTO1: apply=true weight=1
    IKMarkerTask RTO3: apply=true weight=1
    IKMarkerTask LTO3: apply=true weight=1
    IKMarkerTask RTO5: apply=true weight=1
    IKMarkerTask LTO5: apply=true weight=1
    IKMarkerTask RHEE: apply=true weight=1
    IKMarkerTask LHEE: apply=true weight=1
