# OpenSim document version 40500
ScaleTool subject01:
  mass: 72.6
  height: 1503.4
  age: 99
  notes: This is an example setup file for scale.exe.
  GenericModelMaker:
    model_file: generic_unscaled.osim
    marker_set_file: Aline\Aline_MODEL_markers_1.xml
  ModelScaler:
    apply: true
    scaling_order: measurements
    marker_file: Aline\tposeground_for_pre8walk.trc
    time_range: 0 1
    preserve_mass_distribution: true
    output_model_file: Aline\Aline_scaled_model.osim
    output_scale_file: Aline\Aline_scaleSet.xml
    MeasurementSet gait2354:
      Measurement torso: apply=true
        MarkerPair: markers=(CVC7 MSTC)
        BodyScale torso: axes=(X Y Z)
      Measurement ulna_r: apply=true
        MarkerPair: markers=(RFRA RFUL)
        BodyScale ulna_r: axes=(X Y Z)
      Measurement ulna_l: apply=true
        MarkerPair: markers=(LFRA LFUL)
        BodyScale ulna_l: axes=(X Y Z)
      Measurement radius_l: apply=true
        MarkerPair: markers=(LWRA LWUL)
        BodyScale radius_l: axes=(X Y Z)
      Measurement radius_r: apply=true
        MarkerPair: markers=(RWRA RWUL)
        BodyScale radius_r: axes=(X Y Z)
      Measurement pelvis: apply=true
        MarkerPair: markers=(RASI LTMS)
        BodyScale pelvis: axes=(X Y Z)
      Measurement thigh_l: apply=true
        MarkerPair: markers=(LTLH LTLL)
        BodyScale femur_l: axes=(X Y Z)
      Measurement shank_l: apply=true
        MarkerPair: markers=(LTMT LTLF)
        BodyScale tibia_l: axes=(X Y Z)
      Measurement foot_l: apply=true
        MarkerPair: markers=(LHEE LTO1)
          MarkerPair: markers=(LHEE LTO5)
        BodyScale talus_l: axes=(X Y Z)
        BodyScale calcn_l: axes=(X Y Z)
        BodyScale toes_l: axes=(X Y Z)
      Measurement thigh_r: apply=true
        MarkerPair: markers=(RTLH RTLL)
        BodyScale femur_r: axes=(X Y Z)
      Measurement shank_r: apply=true
        MarkerPair: markers=(RTMT RTLF)
        BodyScale tibia_r: axes=(X Y Z)
      Measurement foot_r: apply=true
        MarkerPair: markers=(RHEE RTO1)
        MarkerPair: markers=(RHEE RTO5)
        BodyScale talus_r: axes=(X Y Z)
        BodyScale calcn_r: axes=(X Y Z)
        BodyScale toes_r: axes=(X Y Z)
    ScaleSet gait2354_Scale:
      Scale: scales=(1.14724 1.14724 1.14724) segment=femur_r apply=false
      Scale: scales=(0.988523 0.988523 0.988523) segment=tibia_r apply=false
      Scale: scales=(1.14724 1.14724 1.14724) segment=femur_l apply=false
      Scale: scales=(0.988523 0.988523 0.988523) segment=tibia_l apply=false
  MarkerPlacer:
    apply: true
    marker_file: Aline\tposeground_for_pre8walk.trc
    time_range: 0 1
    output_motion_file: subject01_static_output.mot
    output_model_file: Aline\Aline_scaled_model_markers.osim
    max_marker_movement: -1
    IKTaskSet gait2354_Scale:
      IKMarkerTask RSHO: apply=true weight=1
      IKMarkerTask LSHO: apply=true weight=1
      IKMarkerTask RHLT: apply=true weight=1
      IKMarkerTask LHLT: apply=true weight=1
      IKMarkerTask RHVT: apply=true weight=1
      IKMarkerTask LHVT: apply=true weight=1
      IKMarkerTask MSTC: apply=true weight=1
      IKMarkerTask RLEK: apply=true weight=1
      IKMarkerTask RMEK: apply=true weight=1
      IKMarkerTask LLEK: apply=true weight=1
      IKMarkerTask LMEK: apply=true weight=1
      IKMarkerTask RFRA: apply=true weight=1
      IKMarkerTask RFUL: apply=true weight=1
      IKMarkerTask LFRA: apply=true weight=1
      IKMarkerTask LFUL: apply=true weight=1
      IKMarkerTask RWRA: apply=true weight=1
      IKMarkerTask RWUL: apply=true weight=1
      IKMarkerTask LWRA: apply=true weight=1
      IKMarkerTask LWUL: apply=true weight=1
      IKMarkerTask RASI: apply=true weight=1
      IKMarkerTask LASI: apply=true weight=1
      IKMarkerTask RTMS: apply=true weight=1
      IKMarkerTask LTMS: apply=true weight=1
      IKMarkerTask RPSI: apply=true weight=1
      IKMarkerTask LPSI: apply=true weight=1
      IKMarkerTask SACR: apply=true weight=1
      IKCoordinateTask [values shared by the 5 below unless stated]: apply=false weight=1 value_type=default_value
          value=0
      IKCoordinateTask subtalar_angle_r
      IKCoordinateTask mtp_angle_r
      IKCoordinateTask subtalar_angle_l
      IKCoordinateTask mtp_angle_l
      IKCoordinateTask lumbar_extension: value_type=manual_value
