# OpenSim document version 40500
ScaleTool subject01:
  mass: 72.6 [kg]
  height: 1503.4
  age: 99
  notes: This is an example setup file for scale.exe.
  GenericModelMaker:
    model_file: gait2354_simbody.osim
    marker_set_file: gait2354_Scale_MarkerSet.xml
  ModelScaler:
    apply: true
    scaling_order: measurements
    marker_file: subject01_static.trc
    time_range: 0 1
    preserve_mass_distribution: true
    output_model_file: scaling_results/subject01_scaled_correct_marker_placement.osim
    output_scale_file: scaling_results/subject01_scaleSet_applied_correct_marker_placement.xml
    MeasurementSet gait2354:
      Measurement torso: apply=true
        MarkerPair: markers=(C7 T10)
        MarkerPair: markers=(JN XIPH)
        BodyScale torso: axes=(X Y Z)
      Measurement pelvis: apply=true
        MarkerPair: markers=(RASIS LASIS)
        BodyScale pelvis: axes=(X Y Z)
      Measurement thigh_l: apply=true
        MarkerPair: markers=(LASIS LLEK)
        MarkerPair: markers=(LLTHI LMEK)
        BodyScale femur_l: axes=(X Y Z)
      Measurement shank_l: apply=true
        MarkerPair: markers=(LLM LLEK)
        BodyScale tibia_l: axes=(X Y Z)
      Measurement foot_l: apply=true
        MarkerPair: markers=(LHEE LMT2)
          MarkerPair: markers=(LHEE LMT5)
        BodyScale talus_l: axes=(X Y Z)
        BodyScale calcn_l: axes=(X Y Z)
        BodyScale toes_l: axes=(X Y Z)
      Measurement thigh_r: apply=true
        MarkerPair: markers=(RASIS RLEK)
          MarkerPair: markers=(RLTHI RMEK)
        BodyScale femur_r: axes=(X Y Z)
      Measurement shank_r: apply=true
        MarkerPair: markers=(RLM RLEK)
        BodyScale tibia_r: axes=(X Y Z)
      Measurement foot_r: apply=true
        MarkerPair: markers=(RHEE RMT2)
        MarkerPair: markers=(RHEE RMT5)
        BodyScale talus_r: axes=(X Y Z)
        BodyScale calcn_r: axes=(X Y Z)
        BodyScale toes_r: axes=(X Y Z)
    ScaleSet gait2354_Scale:
      Scale: scales=(1.14724 1.14724 1.14724) segment=femur_r apply=false
      Scale: scales=(0.988523 0.988523 0.988523) segment=tibia_r apply=false
      Scale: scales=(1.14724 1.14724 1.14724) segment=femur_l apply=false
      Scale: scales=(0.988523 0.988523 0.988523) segment=tibia_l apply=false
  MarkerPlacer:
    apply: true
    marker_file: subject01_static.trc
    time_range: 0 1
    output_motion_file: subject01_static_output.mot
    output_model_file: scaling_results/subject01_scaled_correct_marker_placement_with_markers.osim
    max_marker_movement: -1
    IKTaskSet gait2354_Scale:
      IKMarkerTask LASIS: apply=true weight=1
      IKMarkerTask RASIS: apply=true weight=1
      IKMarkerTask LPSIS: apply=true weight=1
      IKMarkerTask RPSIS: apply=true weight=1
      IKMarkerTask LLTHI: apply=true weight=1
      IKMarkerTask RLTHI: apply=true weight=1
      IKMarkerTask LLEK: apply=true weight=1
      IKMarkerTask LMEK: apply=true weight=1
      IKMarkerTask LLSHA: apply=true weight=1
      IKMarkerTask LLM: apply=true weight=1
      IKMarkerTask LMM: apply=true weight=1
      IKMarkerTask LHEE: apply=true weight=1
      IKMarkerTask LMT2: apply=true weight=1
      IKMarkerTask LMT5: apply=true weight=1
      IKMarkerTask RLEK: apply=true weight=1
      IKMarkerTask RMEK: apply=true weight=1
      IKMarkerTask RLM: apply=true weight=1
      IKMarkerTask RMM: apply=true weight=1
      IKMarkerTask RHEE: apply=true weight=1
      IKMarkerTask RMT2: apply=true weight=1
      IKMarkerTask RMT5: apply=true weight=1
      IKMarkerTask C7: apply=true weight=1
      IKMarkerTask T10: apply=true weight=1
      IKMarkerTask XIPH: apply=true weight=1
      IKMarkerTask JN: apply=true weight=1
      IKMarkerTask RLSHA: apply=true weight=1
      IKCoordinateTask [values shared by the 5 below unless stated]: apply=false weight=1 value_type=default_value
          value=0
      IKCoordinateTask subtalar_angle_r
      IKCoordinateTask mtp_angle_r
      IKCoordinateTask subtalar_angle_l
      IKCoordinateTask mtp_angle_l
      IKCoordinateTask lumbar_extension: value_type=manual_value
