# OpenSim document version 40500
AnalyzeTool 3DGaitModel2354-scaled:
  model_file: Aline\Aline_scaled_model_markers.osim
  replace_force_set: false
  results_directory: Aline\updated_pointkinematics
  output_precision: 8
  initial_time: 0
  final_time: 4.65
  solve_for_equilibrium_for_auxiliary_states: false
  maximum_number_of_integrator_steps: 20000
  maximum_integrator_step_size: 1
  minimum_integrator_step_size: 1e-8
  integrator_error_tolerance: 1e-5
  coordinates_file: Aline\pre8walk01__motion.mot
  lowpass_cutoff_frequency_for_coordinates: -1
  AnalysisSet Analyses:
    PointKinematics [values shared by the 61 below unless stated]: start_time=0 end_time=199.5 step_interval=1
        in_degrees=true relative_to_body_name=none
    PointKinematics: body_name=torso point_name=RSHO point=(-0.003 0.425 0.13)
    PointKinematics: body_name=torso point_name=LSHO point=(-0.003 0.425 -0.13)
    PointKinematics: body_name=humerus_r point_name=RHLT point=(0.00587367 -0.129444 0.0220727)
    PointKinematics: body_name=humerus_l point_name=LHLT point=(0.00587367 -0.129444 -0.0220727)
    PointKinematics: body_name=humerus_r point_name=RHVT point=(0.0449329 -0.129807 6.42431e-6)
    PointKinematics: body_name=humerus_l point_name=LHVT point=(0.0449329 -0.129807 -6.42431e-6)
    PointKinematics: body_name=torso point_name=MSTC point=(0.0426971 0.379441 -0.00194467)
    PointKinematics: body_name=humerus_r point_name=RLEK point=(0.015 -0.28 0.04)
    PointKinematics: body_name=humerus_r point_name=RMEK point=(0.00225 -0.286 -0.046)
    PointKinematics: body_name=humerus_l point_name=LLEK point=(0.015 -0.28 -0.04)
    PointKinematics: body_name=humerus_l point_name=LMEK point=(0.00225005 -0.286 0.046)
    PointKinematics: body_name=ulna_r point_name=RFRA point=(-0.00902451 -0.118517 0.0659393)
    PointKinematics: body_name=ulna_r point_name=RFUL point=(-0.0315658 -0.125336 -0.0131706)
    PointKinematics: body_name=ulna_l point_name=LFRA point=(-0.00902451 -0.118517 -0.0659393)
    PointKinematics: body_name=ulna_l point_name=LFUL point=(-0.0315658 -0.125336 0.0131706)
    PointKinematics: body_name=radius_r point_name=RWRA point=(0.0005 -0.225 0.05)
    PointKinematics: body_name=radius_r point_name=RWUL point=(-0.022 -0.225 -0.022)
    PointKinematics: body_name=radius_l point_name=LWRA point=(0.0005 -0.225 -0.05)
    PointKinematics: body_name=radius_l point_name=LWUL point=(-0.022 -0.225 0.022)
    PointKinematics: body_name=pelvis point_name=RASI point=(0.0068271 0.0165658 0.125314)
    PointKinematics: body_name=pelvis point_name=LTMS point=(-0.0395501 0.0852442 -0.113105)
    PointKinematics: body_name=pelvis point_name=RTMS point=(-0.0395501 0.0852442 0.113105)
    PointKinematics: body_name=pelvis point_name=RPSI point=(-0.155 0.035 0.045)
    PointKinematics: body_name=pelvis point_name=LPSI point=(-0.155 0.035 -0.045)
    PointKinematics: body_name=pelvis point_name=SACR point=(-0.143659 0.0561014 0)
    PointKinematics: body_name=torso point_name=CVC7 point=(-0.085 0.435 0.00165426)
    PointKinematics: body_name=torso point_name=LBHD point=(-0.0686083 0.623087 -0.0363533)
    PointKinematics: body_name=torso point_name=RBHD point=(-0.0686083 0.623087 0.0363533)
    PointKinematics: body_name=torso point_name=LFHD point=(0.0707969 0.620352 -0.0415974)
    PointKinematics: body_name=torso point_name=RFHD point=(0.0707969 0.620352 0.0415974)
    PointKinematics: body_name=femur_r point_name=RTLH point=(0.0100122 -0.149218 0.0930769)
    PointKinematics: body_name=femur_l point_name=LTLH point=(0.0100122 -0.149218 -0.0930769)
    PointKinematics: body_name=femur_r point_name=RTLL point=(0.0117212 -0.283283 0.079093)
    PointKinematics: body_name=femur_l point_name=LTLL point=(0.0117212 -0.283283 -0.079093)
    PointKinematics: body_name=femur_r point_name=RTFR point=(0.0807379 -0.261245 0.00968276)
    PointKinematics: body_name=femur_l point_name=LTFR point=(0.0807379 -0.261245 -0.00968276)
    PointKinematics: body_name=femur_r point_name=RLCO point=(0 -0.404 0.05)
    PointKinematics: body_name=femur_l point_name=LLCO point=(0 -0.404 -0.05)
    PointKinematics: body_name=femur_r point_name=RMCO point=(0 -0.404 -0.05)
    PointKinematics: body_name=femur_l point_name=LMCO point=(0 -0.404 0.05)
    PointKinematics: body_name=tibia_r point_name=RTIB point=(-0.00379356 -0.0427297 0.0519845)
    PointKinematics: body_name=tibia_l point_name=LTIB point=(-0.00379356 -0.0427297 -0.0519845)
    PointKinematics: body_name=tibia_r point_name=RTTT point=(0.0565283 -0.0443862 0.000724809)
    PointKinematics: body_name=tibia_l point_name=LTTT point=(0.0565283 -0.0443862 -0.000724809)
    PointKinematics: body_name=tibia_r point_name=RTMT point=(0.0369643 -0.230107 -0.00391699)
    PointKinematics: body_name=tibia_l point_name=LTMT point=(0.0369643 -0.230107 0.00391699)
    PointKinematics: body_name=tibia_r point_name=RTLF point=(0.0113793 -0.295236 0.0553541)
    PointKinematics: body_name=tibia_l point_name=LTLF point=(0.0113793 -0.295236 -0.0553541)
    PointKinematics: body_name=tibia_r point_name=RLMA point=(-0.005 -0.3888 0.053)
    PointKinematics: body_name=tibia_l point_name=LLMA point=(-0.005 -0.3888 -0.053)
    PointKinematics: body_name=tibia_r point_name=RMMA point=(0.006 -0.3888 -0.038)
    PointKinematics: body_name=tibia_l point_name=LMMA point=(0.006 -0.3888 0.038)
    PointKinematics: body_name=calcn_r point_name=RTO1 point=(0.233469 0.0161821 -0.0204925)
    PointKinematics: body_name=calcn_l point_name=LTO1 point=(0.233469 0.0161821 0.0204925)
    PointKinematics: body_name=calcn_r point_name=RTO3 point=(0.178155 0.0197917 0.0112671)
    PointKinematics: body_name=calcn_l point_name=LTO3 point=(0.178155 0.0197917 -0.0112671)
    PointKinematics: body_name=calcn_r point_name=RTO5 point=(0.18776 0.010815 0.0455057)
    PointKinematics: body_name=calcn_l point_name=LTO5 point=(0.18776 0.010815 -0.0455057)
    PointKinematics: body_name=calcn_r point_name=RHEE point=(-0.025 0.02 -0.005)
    PointKinematics: body_name=calcn_l point_name=LHEE point=(-0.025 0.02 0.005)
    PointKinematics: body_name=pelvis point_name=LASI point=(0.00725057 -0.00588547 -0.11264)
